************************************************************************
*Heading
Spicule bending with 3 layers
************************************************************************
**
** Kaushik Vijaykumar, March 2015
**
************************************************************************
**                          Parameters
************************************************************************
*Parameter
**
** Shear modulus (MPa)
Gh =8.0e3
Gs =8.0e3
**
** Bulk modulus (MPa)
Kh = 17.33e3
Ks = 17.33e3
**
** Energy release rate (N/mm)
Gch = 0.5
Gcs = 0.05
** Length scale (mm)
l_0 = 0.025
** Kvar
kvarh = 0.0002
kvars = 0.0002
** eta penalty term
eta = 5
** n integer
n = 2
** total simulation time (seconds)
tf = 1.0
**
************************************************************************
**                      Model definition
************************************************************************
**
** Nodes
**
*Node, nset=nall
      1,          2.5,   1.70000005
      2,           0.,   1.70000005
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**
** Elements
**
*User Element,Nodes=4,Type=U1,Iproperties=1,Properties=6,Coordinates=2,Variables=40,Unsymm
1,2,11
*Element, type=U1, elset=elhard
1,33,34,2874,2711
2,3783,3819,3798,3059
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*Element, type=U1, elset=elsoft
13219,5694,5801,402,5779
13220,5801,5694,5781,5408
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**
** Make the dummy mesh, shares nodes with the real mesh,
**  allows visualization of the results, access to
**  hourglass controls, and access to mechanical,
**  traction-type boundary conditions
**
*Element, type=CPE4, elset=eldummy
17178,33,34,2874,2711
17179,3783,3819,3798,3059
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** Make a dummy element which is not connected to anything with CAX4T
**  just so that the coupled thermal-displacement analysis is available.
**
*Node
9999996,  0.001, 0.001
9999997,  0.002, 0.001
9999998,  0.002, 0.002
9999999,  0.001, 0.002
*Nset, nset=tempElement
9999996,9999997,9999998,9999999
*Element, Type=CAX4T
99999999,9999996,9999997,9999998,9999999
*Elset,elset=tempElement
99999999
**
** Sets
**
*Nset, nset=Load
17,
*Nset, nset=Roller_right
5,
*Nset, nset=Roller_left
7,
************************************************************************
**                    MATERIAL DEFINITION
************************************************************************
**
** Material properties for the real material
**
*uel property,elset=elhard
*******************************************************************
**Gshear    Kbulk     Gc      l_0        Kvar    eta,   n
<Gh>,         <Kh>,    <Gch>,   <l_0>,     <kvarh>, <eta>, <n>
**
*uel property,elset=elsoft
*******************************************************************
**Gshear    Kbulk     Gc      l_0        Kvar    eta,   n
<Gs>,         <Ks>,    <Gcs>,   <l_0>,     <kvars>, <eta>, <n>
**
*******************************************************************
**
** Dummy mesh material properties
**
*Solid section, elset=ElDummy, material=Material-1
*Solid section, elset=tempElement, material=Material-2
**
*Material, name=Material-1
*User output variables
10
** The dummy mesh stiffness is very small
*Elastic
1.e-20
*Density
1.0
*Material, name=Material-2
*Elastic
1.e-20
*Conductivity
1.0
*Density
1.0
*Specific heat
1.0
**
************************************************************************
**                   Boundary conditions
************************************************************************
**
** Initial BCS
**
**boundary
**
************************************************************************
**                  INITIAL CONDITIONS
************************************************************************
*Initial conditions, type=temperature
nall, 0.0
tempElement, 0.0
************************************************************************
**                  Step definition
************************************************************************
*Step, Name=load, nlgeom=no, inc=5000000000000000000000000
*Coupled temperature-displacement, deltmx=1.e09
1.e-5,<tf>,1.e-20,0.02
*CONTROLS, PARAMETERS=TIME INCREMENTATION
,,,,,,,20,,,,,,
*Boundary
Load,2,2,-0.5
Roller_right,1,2
Roller_left,2,2
*boundary
tempElement,1,2
tempElement,11,11
****************
****************  OUTPUTS
****************
****************  Field output
****************
*Output, field, frequency=1
*node output, nset=nall
u,coord,nt,rf
*Element output, elset=eldummy
uvarm,e
****************
****************  History output
****************
*END STEP
************************************************************************
